# OpenSim document version 40000
InverseKinematicsTool:
  results_directory: ./
  constraint_weight: Inf
  accuracy: 1e-5
  marker_file: ../../../Data/DLCgrasp_training_frames/data3Dshort.trc
  time_range: 0.0333 12
  report_errors: true
  output_motion_file: ../../../Data/DLCgrasp_training_frames/data3Dshort.mot
  report_marker_locations: false
  IKTaskSet:
    IKMarkerTask D2D: apply=true weight=1
    IKMarkerTask D2I: apply=true weight=1
    IKMarkerTask D2P: apply=true weight=1
    IKMarkerTask D3D: apply=true weight=1
    IKMarkerTask D3I: apply=true weight=1
    IKMarkerTask D3P: apply=true weight=1
    IKMarkerTask D4P: apply=true weight=1
    IKMarkerTask D4I: apply=true weight=1
    IKMarkerTask D4D: apply=true weight=1
    IKMarkerTask D5P: apply=true weight=1
    IKMarkerTask D5I: apply=true weight=1
    IKMarkerTask D5D: apply=true weight=1
    IKMarkerTask D1P: apply=true weight=1
    IKMarkerTask D1D: apply=true weight=1
    IKMarkerTask D1H: apply=true weight=1
    IKMarkerTask D2H: apply=true weight=1
    IKMarkerTask D3H: apply=true weight=1
    IKMarkerTask D4H: apply=true weight=1
    IKMarkerTask D5H: apply=true weight=1
    IKMarkerTask HC: apply=true weight=1
    IKMarkerTask HM: apply=true weight=1
    IKMarkerTask HL: apply=true weight=1
    IKMarkerTask WrM: apply=false weight=1
    IKMarkerTask WrL: apply=false weight=1
    IKMarkerTask WrC: apply=false weight=1
    IKMarkerTask ArmM: apply=false weight=1
    IKMarkerTask ArmL: apply=false weight=1
    IKMarkerTask ArmC: apply=false weight=1
    IKMarkerTask BicM: apply=false weight=1
    IKMarkerTask BicL: apply=false weight=1
    IKMarkerTask BicC: apply=false weight=1
